Advanced
#MACH
0
#IYsym 	IZsym 	Zsym 	Vehicle Symmetry
0 	0 	0
#Sref 	Cref 	Bref 	Reference Area and Lengths
2804.5875	19.476	16.1664
#Xref 	Yref 	Zref 	Center of Gravity Location
4.5 	0 	0

#==============================================
SURFACE
Wing
#Nchord 	Cspace 	Nspan 	Sspace
10 	1 	20 	1
YDUPLICATE
0
#----------------------------------------------
SECTION
#Xle 	Yle 	Zle 	Chord 	Ainc 	Nspan 	Sspace
-9.5 	0 	0 	35 	0 	0 	0
AFILE
nlf0215f-il.dat
#----------------------------------------------
SECTION
#Xle 	Yle 	Zle 	Chord 	Ainc 	Nspan 	Sspace
-9.5 	4.5 	0 	35 	0 	0 	0
AFILE
nlf0215f-il.dat
#----------------------------------------------
SECTION
#Xle 	Yle 	Zle 	Chord 	Ainc 	Nspan 	Sspace
0 	13.5 	2 	21.131 	0 	0 	0
AFILE
sd7062.dat
#----------------------------------------------
SECTION
#Xle 	Yle 	Zle 	Chord 	Ainc 	Nspan 	Sspace
0 	35.507 	2 	21.131 	0 	0 	0
AFILE
sd7062.dat
CONTROL
#NAME 	GAIN 	XHinge 	XHVEC 	YHVEC 	ZHVEC 	SGNDUP
Aileron 	-1 	0.7 	0 	0 	0 	-1
#----------------------------------------------
SECTION
#Xle 	Yle 	Zle 	Chord 	Ainc 	Nspan 	Sspace
0 	62.3538	2 	16.166 	0 	0 	0
AFILE
sd7062.dat
CONTROL
#NAME 	GAIN 	XHinge 	XHVEC 	YHVEC 	ZHVEC 	SGNDUP
Aileron 	-1 	0.7 	0 	0 	0 	-1
