#Name of configuration
Test
#MACH
0.0
#IYsym 	IZsym 	Zsym 	Vehicle 	Symmetry
0 	0 	0
#Sref 	Cref 	Bref 	Reference 	Area 	and 	Lengths
6.0 	1.0 	6.0
#Xref 	Yref 	Zref 	Center 	of 	Gravity 	Location
0.0 	0.0 	0.0

#==============================================
SURFACE
wing
#Nchord        Cspace
5         1
YDUPLICATE
0
#----------------------------------------------
SECTION
#Xle 	Yle 	Zle 	Chord 	Ainc 	Nspan 	Sspace
0.0 	0.0 	0.0 	1.5 	0 	1 	10
NACA
2412
#----------------------------------------------
SECTION
#Xle 	Yle 	Zle 	Chord 	Ainc 	Nspan 	Sspace
1.5 	3.0 	0.0 	0.5 	-2 	1 	10
NACA
2412
#==============================================
SURFACE
tail
#Nchord        Cspace
5         1
YDUPLICATE
0
#----------------------------------------------
SECTION
#Xle 	Yle 	Zle 	Chord 	Ainc 	Nspan 	Sspace
3.0 	0.0 	0.0 	0.7 	0 	1 	10
NACA
0010
#----------------------------------------------
SECTION
#Xle 	Yle 	Zle 	Chord 	Ainc 	Nspan 	Sspace
3.0 	1.0 	-0.5 	0.5 	0 	1 	10
NACA
0010
